variable        T equal ${temp}
variable        I equal ${index}
variable        seed equal ${index}+200
variable        seed2 equal ${index}+300    # stupid
variable        every equal 1000

dimension       3

units           metal
boundary        p p p
atom_style      atomic
neighbor        2 bin

lattice         fcc 3.52

variable        S equal ${size}
variable        Smid equal (${size}/2)
variable        Smod equal (${size}/2+0.5)

region          box block 0 ${S} 0 ${S} 0 ${S}
create_box      3 box

mass            1 58.69
mass            2 55.85
mass            3 52.00

pair_style      eam/alloy
pair_coeff      * * FeNiCr_ArturV3.eam Ni Fe Cr

create_atoms    1 box

set             type 1 type/fraction 2 0.10 ${seed}
set             type 1 type/fraction 3 0.18 ${seed2}

group           Ni type 1
group           Fe type 2
group           Cr type 3

create_atoms    1 single  ${Smid} ${Smod} ${Smid}

velocity        all create $T ${seed}

fix             1 all npt temp $T $T 5 iso 0 0 10

thermo          1000

timestep        0.001

run             50000

compute         msd_Ni Ni msd
variable        msd_Ni_ equal c_msd_Ni[4]
fix             msdoutNi all print ${every} "${msd_Ni_}" file ./NiFeCr/$I_msd_Ni_$T.txt screen no

compute         msd_Fe Fe msd
variable        msd_Fe_ equal c_msd_Fe[4]
fix             msdoutFe all print ${every} "${msd_Fe_}" file ./NiFeCr/$I_msd_Fe_$T.txt screen no

compute         msd_Cr Cr msd
variable        msd_Cr_ equal c_msd_Cr[4]
fix             msdoutCr all print ${every} "${msd_Cr_}" file ./NiFeCr/$I_msd_Cr_$T.txt screen no

variable        pe equal pe
fix             peout all print ${every} "${pe}" file ./NiFeCr/$I_pe_$T.txt screen no

thermo_style    custom step temp pe c_msd_Ni[4]

run             5000000
